# Integrate the Bufler flop RN model - units msec-1 conc uM-1
k1 := .008
k2 := .004
k3 := .004
kd1 := 4.5
kd2 := .600
alpha := 2.4
# original alpha was 5
factor := 1
# [component: outputs HEKDAT]
C := 1
O := 0
km1 := 2
km2 := 4
km3 := .0622
kdm1 := .007
kdm2 := .06
beta := 20
N0 := 5000
CA1 := 0
DA1 := 0
tau := N0*0.0001/2000
CA2 := 0
DA2 := 0
D := .3*10^-5
cleft := 2*10^-6
kd1 := kd1*factor
km2 := km2*factor
beta := beta*factor
eps := cleft^2/(6*D)
eps = 2.22222e-7
zz := [C; CA1; CA2; O; DA1; DA2]
zz = [1; 0; 0; 0; 0; 0]
1/(beta + km2 + kd1) = 0.0350877
# Original parameters
# k1=0.008; k2= 0.004; k3=0.004
# km1=2; km2=4; km3=0.0622
# kd1=4.5; kd2= 0.60
# kdm1=0.007; kdm2=0.6
# alpha=2.4; beta=20
Csyna(t) := N0/(6.02*10^23)/(4*π*D*tau)*integral(e^(-s/tau)/(t - s), s = 0 .. t - eps)
Csyn(t) := Csyna(t)*10^3/cleft
L(x) := 10^6*Csyn(x/1000)
DD(t, zz) := [
    -k1*L(t)*zz[0] + km1*zz[1];
    k1*L(t)*zz[0] - (km1 + kd2 + k2*L(t))*zz[1] + km2*zz[2] + kdm2*zz[4];
    k2*L(t)*zz[1] - (km2 + beta + kd1)*zz[2] + alpha*zz[3] + kdm1*zz[5];
    beta*zz[2] - alpha*zz[3];
    kd2*zz[1] - (kdm2 + k3*L(t))*zz[4] + km3*zz[5];
    k3*L(t)*zz[4] - (km3 + kdm1)*zz[5] + kd1*zz[2]
]
N := 2000
n := 0 .. N
# Perform the numerical integration of the system, DD, with the command rkfixed
km1/k1 = 250
km2/k2 = 1000
km3/k3 = 15.55
# detailed balance
k2*kd1*km3*kdm2 = 6.7176e-5
VV := Adams(zz, eps, 10, N, DD)
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km2*kd2*k3*kdm1 = 6.72e-5
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XX[n] := VV[n, 4]
XXmax := max(XX)
XXmax = 0.463143
Rise10 :=
    for j ∈ 0 .. 2000
        if XX[j] > XXmax*.1
            A ← j
            break
    = 14
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Rise90 :=
    for j ∈ Rise10 .. 2000
        if XX[j] > XXmax*.9
            A ← j
            break
    = 7*9
eps1 := 10^-7
tttt := 0 .. 1000
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ttt[tttt] := eps1 + .0000001*tttt
XX[Rise10] = 0.0482705
XX[Rise90] = 0.417324
CC[tttt] := integral(e^(-s/tau)/(ttt[tttt] - s), s = 0 .. ttt[tttt] - eps1)
XXmax = 0.463143
VV[Rise10, 0] = 0.0700002
VV[Rise90, 0] = 0.315
m := 0 .. 6
k := 99
VO[n] := VV[n, 4]/max(XX)
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V[m] := VV[k, m]
VV[Rise90, 0] - VV[Rise10, 0] = 0.245
transpose(V) = [0.495, 0.0580291, 0.153956, 0.05667, 0.462986, 0.0321468, 0.236212]
Output[1] := VV[Rise90, 0] - VV[Rise10, 0]
max(CC) = 5.26139
Output[0] := XXmax
sum(V[i], i = 1 .. 6) = 1
j := 1 .. N
VV[22, 0] - VV[21, 0] = 0.005
XD[j] := VV[j, 4] - VV[j - 1, 4]
max(XD) = 0.0106663
220*VV[n, 4] =  # no stored result
max(XD)/(max(XX)*(VV[2, 0] - VV[1, 0])) = 4.60606
Output[2] := max(XD)/(max(XX)*(VV[2, 0] - VV[1, 0]))
j := 0 .. 23
interval := VV[10, 0]
interval = 0.0500002
Decay[j] := VV[100 + 10*j, 4]
j := 1 .. 23
Decayx[j - 1] := Decay[j - 1]/Decay[j]
VV =  # no stored result
taux := interval/ln(mean(Decayx))
Output[3] := taux
taux = 2.09232
# Max Rise slope  tau
transpose(Output) = [0.463143, 0.245, 4.60606, 2.09232]
